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/COM,ANSYS RELEASE 2022 R2           BUILD 22.2      UP20220516       17:50:26
/PREP7
/TITLE,wbnew--Transient (B5)
ANTYPE, 4
EQSLV,SPAR,  0.00000000    ,,0
NLGEOM, 1
TOFFST,  273.150000
TRNOPT,FULL,,,,,HHT ,,,NO
DMPOPT,ESAV,NO
DMPOPT,EMAT,NO
*IF,_CDRDOFF,EQ,1,THEN     !if solid model was read in
_CDRDOFF=             !reset flag, numoffs already performed
*ELSE              !offset database for the following FE model
NUMOFF,NODE,     2032
NUMOFF,ELEM,     2681
NUMOFF,MAT ,        2
NUMOFF,SECN,        2
NUMOFF,TYPE,        2
*ENDIF
*SET,TEMPERATURE,'TEMP                            '
*SET,_ASMDIAG,  594.9215456521
*SET,_DS_PROGRESS,  999.0000000000
*SET,_MAXELEMNUM,  2681.000000000
*SET,_MAXELEMTYPE,  2.000000000000
*SET,_MAXNODENUM,  2032.000000000
*SET,_NUMELEM,  2479.000000000
*SET,_NUMNODE,  2032.000000000
*SET,_RETURN ,  0.000000000000
*SET,_STATUS ,  1.000000000000
*SET,_THICKRATIO, 0.5000000000000
*SET,_WALLBSOL,  17.84055555556
*SET,_WALLSTRT,  17.84055555556
*SET,_WB_PROJECTSCRATCH_DIR(1,       1,       1),'C:\Users\SDEA-XEON-V4\AppData\Local\Temp\WB_SDEA-XEON-V4_9184_2\_ProjectScratch\ScrC3EB\                                                                                                                                                                '
*SET,_WB_SOLVERFILES_DIR(1,       1,       1),'C:\Users\SDEA-XEON-V4\AppData\Local\Temp\WB_SDEA-XEON-V4_9184_2\wbnew_files\dp0\SYS-1\MECH\                                                                                                                                                             '
*SET,_WB_USERFILES_DIR(1,       1,       1),'C:\Users\SDEA-XEON-V4\AppData\Local\Temp\WB_SDEA-XEON-V4_9184_2\wbnew_files\user_files\                                                                                                                                                                 '
*SET,_XMAX   ,  217.7158056000
*SET,_XMIN   , -200.8975088000
*SET,_YMAX   ,  58.79992768000
*SET,_YMIN   ,  0.000000000000
*SET,_ZMAX   ,  224.3871307000
*SET,_ZMIN   , -194.2261837000
DOF,DELETE
ET,        1,185
ET,        2,181
KEYOP,        2, 3,        2
NBLOCK,6,SOLID,      2032,      2032
(3i9,6e21.13e3)
        1        0        0-1.1285754980000E+001 3.1687495110000E+001-4.7012335170000E+001
        2        0        0-1.0740620870000E+001 3.1090000000000E+001 8.4780158240000E+000
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N,UNBL,LOC,       -1,
EBLOCK,19,SOLID,      2681,      2479
(19i10)
         1         1         1         1         0         0         0         0         8         0         1       128       183       138       138       180       180       180       180
         1         1         1         1         0         0         0         0         8         0         2       136       138       183       183       180       180       180       180
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        -1
CMBLOCK,BALL    ,ELEM,       2  ! users element component definition
(8i10)
         1      -715
CMBLOCK,SUFACE_BALL,NODE,     103  ! users node component definition
(8i10)
         1         2         3         4         5         6         7         8
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CMBLOCK,TARGET  ,ELEM,       2  ! users element component definition
(8i10)
       918     -2681
CMBLOCK,_ICNAME ,NODE,     183  ! users node component definition
(8i10)
         1         2         3         4         5         6         7         8
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MPTEMP,UNBL, 1, 1,  0.00000000    ,
MPDATA,UNBL, 1,EX  ,       1, 1,  200000.000    ,
MPTEMP,UNBL, 1, 1,  0.00000000    ,
MPDATA,UNBL, 1,NUXY,       1, 1, 0.300000000    ,
MPTEMP,UNBL, 1, 1,  0.00000000    ,
MPDATA,UNBL, 1,ALPX,       1, 1, 1.200000000E-05,
MPTEMP,UNBL, 1, 1,  0.00000000    ,
MPDATA,UNBL, 1,DENS,       1, 1, 7.850000000E-09,
MPTEMP,UNBL, 1, 1,  0.00000000    ,
MPDATA,UNBL, 1,KXX ,       1, 1,  60.5000000    ,
MPTEMP,UNBL, 1, 1,  0.00000000    ,
MPDATA,UNBL, 1,RSVX,       1, 1, 1.700000000E-04,
MPTEMP,UNBL, 1, 1,  0.00000000    ,
MPDATA,UNBL, 1,C   ,       1, 1,  434000000.    ,
MPTEMP,UNBL, 1, 1,  0.00000000    ,
MPDATA,UNBL, 1,MURX,       1, 1,  10000.0000    ,
MPTEMP,UNBL,16, 1,  1.00000000    ,  2.00000000    ,  3.00000000
MPTEMP,UNBL,16, 4,  4.00000000    ,  5.00000000    ,  6.00000000
MPTEMP,UNBL,16, 7,  7.00000000    ,  8.00000000    ,  9.00000000
MPTEMP,UNBL,16,10,  10.0000000    ,  11.0000000    ,  12.0000000
MPTEMP,UNBL,16,13,  13.0000000    ,  14.0000000    ,  15.0000000
MPTEMP,UNBL,16,16,  16.0000000    ,
MPDATA,UNBL,16,UMID,       1, 1, 892940336.0    , 845231929.0    , 758591843.0
MPDATA,UNBL,16,UMID,       1, 4, 841823282.0    , 946154809.0    , 808870445.0
MPDATA,UNBL,16,UMID,       1, 7, 892691511.0    , 1684170085.    , 825241701.0
MPDATA,UNBL,16,UMID,       1,10, 538976288.0    , 538976288.0    , 538976288.0
MPDATA,UNBL,16,UMID,       1,13, 538976288.0    , 538976288.0    , 538976288.0
MPDATA,UNBL,16,UMID,       1,16, 538976288.0    ,
MPTEMP,UNBL,16, 1,  1.00000000    ,  2.00000000    ,  3.00000000
MPTEMP,UNBL,16, 4,  4.00000000    ,  5.00000000    ,  6.00000000
MPTEMP,UNBL,16, 7,  7.00000000    ,  8.00000000    ,  9.00000000
MPTEMP,UNBL,16,10,  10.0000000    ,  11.0000000    ,  12.0000000
MPTEMP,UNBL,16,13,  13.0000000    ,  14.0000000    ,  15.0000000
MPTEMP,UNBL,16,16,  16.0000000    ,
MPDATA,UNBL,16,UVID,       1, 1, 943075683.0    , 1700868705.    , 761476406.0
MPDATA,UNBL,16,UVID,       1, 4, 892154937.0    , 878980449.0    , 842098221.0
MPDATA,UNBL,16,UVID,       1, 7, 1647719780.    , 1631020089.    , 942696038.0
MPDATA,UNBL,16,UVID,       1,10, 538976288.0    , 538976288.0    , 538976288.0
MPDATA,UNBL,16,UVID,       1,13, 538976288.0    , 538976288.0    , 538976288.0
MPDATA,UNBL,16,UVID,       1,16, 538976288.0    ,
MPTEMP,UNBL, 1, 1,  0.00000000    ,
MPDATA,UNBL, 1,EX  ,       2, 1,  200000.000    ,
MPTEMP,UNBL, 1, 1,  0.00000000    ,
MPDATA,UNBL, 1,NUXY,       2, 1, 0.300000000    ,
MPTEMP,UNBL, 1, 1,  0.00000000    ,
MPDATA,UNBL, 1,ALPX,       2, 1, 1.200000000E-05,
MPTEMP,UNBL, 1, 1,  0.00000000    ,
MPDATA,UNBL, 1,DENS,       2, 1, 7.850000000E-09,
MPTEMP,UNBL, 1, 1,  0.00000000    ,
MPDATA,UNBL, 1,KXX ,       2, 1,  60.5000000    ,
MPTEMP,UNBL, 1, 1,  0.00000000    ,
MPDATA,UNBL, 1,RSVX,       2, 1, 1.700000000E-04,
MPTEMP,UNBL, 1, 1,  0.00000000    ,
MPDATA,UNBL, 1,C   ,       2, 1,  434000000.    ,
MPTEMP,UNBL, 1, 1,  0.00000000    ,
MPDATA,UNBL, 1,MURX,       2, 1,  10000.0000    ,
MPTEMP,UNBL,16, 1,  1.00000000    ,  2.00000000    ,  3.00000000
MPTEMP,UNBL,16, 4,  4.00000000    ,  5.00000000    ,  6.00000000
MPTEMP,UNBL,16, 7,  7.00000000    ,  8.00000000    ,  9.00000000
MPTEMP,UNBL,16,10,  10.0000000    ,  11.0000000    ,  12.0000000
MPTEMP,UNBL,16,13,  13.0000000    ,  14.0000000    ,  15.0000000
MPTEMP,UNBL,16,16,  16.0000000    ,
MPDATA,UNBL,16,UMID,       2, 1, 892940336.0    , 845231929.0    , 758591843.0
MPDATA,UNBL,16,UMID,       2, 4, 841823282.0    , 946154809.0    , 808870445.0
MPDATA,UNBL,16,UMID,       2, 7, 892691511.0    , 1684170085.    , 825241701.0
MPDATA,UNBL,16,UMID,       2,10, 538976288.0    , 538976288.0    , 538976288.0
MPDATA,UNBL,16,UMID,       2,13, 538976288.0    , 538976288.0    , 538976288.0
MPDATA,UNBL,16,UMID,       2,16, 538976288.0    ,
MPTEMP,UNBL,16, 1,  1.00000000    ,  2.00000000    ,  3.00000000
MPTEMP,UNBL,16, 4,  4.00000000    ,  5.00000000    ,  6.00000000
MPTEMP,UNBL,16, 7,  7.00000000    ,  8.00000000    ,  9.00000000
MPTEMP,UNBL,16,10,  10.0000000    ,  11.0000000    ,  12.0000000
MPTEMP,UNBL,16,13,  13.0000000    ,  14.0000000    ,  15.0000000
MPTEMP,UNBL,16,16,  16.0000000    ,
MPDATA,UNBL,16,UVID,       2, 1, 943075683.0    , 1700868705.    , 761476406.0
MPDATA,UNBL,16,UVID,       2, 4, 892154937.0    , 878980449.0    , 842098221.0
MPDATA,UNBL,16,UVID,       2, 7, 1647719780.    , 1631020089.    , 942696038.0
MPDATA,UNBL,16,UVID,       2,10, 538976288.0    , 538976288.0    , 538976288.0
MPDATA,UNBL,16,UVID,       2,13, 538976288.0    , 538976288.0    , 538976288.0
MPDATA,UNBL,16,UVID,       2,16, 538976288.0    ,
SECTYPE,        2,SHELL,    ,
SECOFFSET,MID
SECBLOCK,      1
     0.001000,         0,     0.000000,         3
SECCONTROL,  0.0000    ,  0.0000    ,  0.0000    ,  0.0000    ,  1.0000    ,  1.0000    ,  1.0000    ,  1.0000    ,,,,  0.0000
EXTOPT,ATTR,      0,      0,      0
EXTOPT,ESIZE,  0,  0.0000
EXTOPT,ACLEAR,      0
KBC,     1,     0
TREF,  22.0000000
IRLF,  0
BFUNIF,TEMP,_TINY
ACEL,  0.00000000    ,  0.00000000    ,  0.00000000
OMEGA,  0.00000000    ,  0.00000000    ,  0.00000000
DOMEGA,  0.00000000    ,  0.00000000    ,  0.00000000
CGLOC,  0.00000000    ,  0.00000000    ,  0.00000000
CGOMEGA,  0.00000000    ,  0.00000000    ,  0.00000000
DCGOMG,  0.00000000    ,  0.00000000    ,  0.00000000
NLDIAG,EFLG,OFF
NLDIAG,NRRE,OFF
NLDIAG,CONT,ITER
AUTOTS,ON
DELTIM, 1.000000000E-04, 1.000000000E-06, 1.000000000E-03,OFF
KUSE,     0
TIME,  1.00000000
ALPHAD,  0.00000000
BETAD,  0.00000000
DMPRAT,  0.00000000
DMPSTR,  0.00000000
TIMINT,ON  ,STRU
TINTP,MOSP, , , ,     0.5000000,     0.2000000,     0.0000000,     0.9000000, 0
CRPLIM, 0.100000000    ,   0
CRPLIM,  0.00000000    ,   1
NCNV,     1,  0.00000000    ,     0,  0.00000000    ,  0.00000000
NEQIT,     0

ERESX,DEFA
OUTRES, ALL,NONE,
OUTRES,NSOL, ALL,
OUTRES,RSOL, ALL,
OUTRES,EANG, ALL,
OUTRES,ETMP, ALL,
OUTRES,VENG, ALL,
OUTRES,STRS, ALL,
OUTRES,EPEL, ALL,
OUTRES,EPPL, ALL,
OUTRES,CONT, ALL,
OUTRES,V   , ALL,
OUTRES,A   , ALL,
IC,        1,VELY, -500.000000
IC,        2,VELY, -500.000000
IC,        3,VELY, -500.000000
IC,        4,VELY, -500.000000
IC,        5,VELY, -500.000000
IC,        6,VELY, -500.000000
IC,        7,VELY, -500.000000
IC,        8,VELY, -500.000000
IC,        9,VELY, -500.000000
IC,       10,VELY, -500.000000
IC,       11,VELY, -500.000000
IC,       12,VELY, -500.000000
IC,       13,VELY, -500.000000
IC,       14,VELY, -500.000000
IC,       15,VELY, -500.000000
IC,       16,VELY, -500.000000
IC,       17,VELY, -500.000000
IC,       18,VELY, -500.000000
IC,       19,VELY, -500.000000
IC,       20,VELY, -500.000000
IC,       21,VELY, -500.000000
IC,       22,VELY, -500.000000
IC,       23,VELY, -500.000000
IC,       24,VELY, -500.000000
IC,       25,VELY, -500.000000
IC,       26,VELY, -500.000000
IC,       27,VELY, -500.000000
IC,       28,VELY, -500.000000
IC,       29,VELY, -500.000000
IC,       30,VELY, -500.000000
IC,       31,VELY, -500.000000
IC,       32,VELY, -500.000000
IC,       33,VELY, -500.000000
IC,       34,VELY, -500.000000
IC,       35,VELY, -500.000000
IC,       36,VELY, -500.000000
IC,       37,VELY, -500.000000
IC,       38,VELY, -500.000000
IC,       39,VELY, -500.000000
IC,       40,VELY, -500.000000
IC,       41,VELY, -500.000000
IC,       42,VELY, -500.000000
IC,       43,VELY, -500.000000
IC,       44,VELY, -500.000000
IC,       45,VELY, -500.000000
IC,       46,VELY, -500.000000
IC,       47,VELY, -500.000000
IC,       48,VELY, -500.000000
IC,       49,VELY, -500.000000
IC,       50,VELY, -500.000000
IC,       51,VELY, -500.000000
IC,       52,VELY, -500.000000
IC,       53,VELY, -500.000000
IC,       54,VELY, -500.000000
IC,       55,VELY, -500.000000
IC,       56,VELY, -500.000000
IC,       57,VELY, -500.000000
IC,       58,VELY, -500.000000
IC,       59,VELY, -500.000000
IC,       60,VELY, -500.000000
IC,       61,VELY, -500.000000
IC,       62,VELY, -500.000000
IC,       63,VELY, -500.000000
IC,       64,VELY, -500.000000
IC,       65,VELY, -500.000000
IC,       66,VELY, -500.000000
IC,       67,VELY, -500.000000
IC,       68,VELY, -500.000000
IC,       69,VELY, -500.000000
IC,       70,VELY, -500.000000
IC,       71,VELY, -500.000000
IC,       72,VELY, -500.000000
IC,       73,VELY, -500.000000
IC,       74,VELY, -500.000000
IC,       75,VELY, -500.000000
IC,       76,VELY, -500.000000
IC,       77,VELY, -500.000000
IC,       78,VELY, -500.000000
IC,       79,VELY, -500.000000
IC,       80,VELY, -500.000000
IC,       81,VELY, -500.000000
IC,       82,VELY, -500.000000
IC,       83,VELY, -500.000000
IC,       84,VELY, -500.000000
IC,       85,VELY, -500.000000
IC,       86,VELY, -500.000000
IC,       87,VELY, -500.000000
IC,       88,VELY, -500.000000
IC,       89,VELY, -500.000000
IC,       90,VELY, -500.000000
IC,       91,VELY, -500.000000
IC,       92,VELY, -500.000000
IC,       93,VELY, -500.000000
IC,       94,VELY, -500.000000
IC,       95,VELY, -500.000000
IC,       96,VELY, -500.000000
IC,       97,VELY, -500.000000
IC,       98,VELY, -500.000000
IC,       99,VELY, -500.000000
IC,      100,VELY, -500.000000
IC,      101,VELY, -500.000000
IC,      102,VELY, -500.000000
IC,      103,VELY, -500.000000
IC,      104,VELY, -500.000000
IC,      105,VELY, -500.000000
IC,      106,VELY, -500.000000
IC,      107,VELY, -500.000000
IC,      108,VELY, -500.000000
IC,      109,VELY, -500.000000
IC,      110,VELY, -500.000000
IC,      111,VELY, -500.000000
IC,      112,VELY, -500.000000
IC,      113,VELY, -500.000000
IC,      114,VELY, -500.000000
IC,      115,VELY, -500.000000
IC,      116,VELY, -500.000000
IC,      117,VELY, -500.000000
IC,      118,VELY, -500.000000
IC,      119,VELY, -500.000000
IC,      120,VELY, -500.000000
IC,      121,VELY, -500.000000
IC,      122,VELY, -500.000000
IC,      123,VELY, -500.000000
IC,      124,VELY, -500.000000
IC,      125,VELY, -500.000000
IC,      126,VELY, -500.000000
IC,      127,VELY, -500.000000
IC,      128,VELY, -500.000000
IC,      129,VELY, -500.000000
IC,      130,VELY, -500.000000
IC,      131,VELY, -500.000000
IC,      132,VELY, -500.000000
IC,      133,VELY, -500.000000
IC,      134,VELY, -500.000000
IC,      135,VELY, -500.000000
IC,      136,VELY, -500.000000
IC,      137,VELY, -500.000000
IC,      138,VELY, -500.000000
IC,      139,VELY, -500.000000
IC,      140,VELY, -500.000000
IC,      141,VELY, -500.000000
IC,      142,VELY, -500.000000
IC,      143,VELY, -500.000000
IC,      144,VELY, -500.000000
IC,      145,VELY, -500.000000
IC,      146,VELY, -500.000000
IC,      147,VELY, -500.000000
IC,      148,VELY, -500.000000
IC,      149,VELY, -500.000000
IC,      150,VELY, -500.000000
IC,      151,VELY, -500.000000
IC,      152,VELY, -500.000000
IC,      153,VELY, -500.000000
IC,      154,VELY, -500.000000
IC,      155,VELY, -500.000000
IC,      156,VELY, -500.000000
IC,      157,VELY, -500.000000
IC,      158,VELY, -500.000000
IC,      159,VELY, -500.000000
IC,      160,VELY, -500.000000
IC,      161,VELY, -500.000000
IC,      162,VELY, -500.000000
IC,      163,VELY, -500.000000
IC,      164,VELY, -500.000000
IC,      165,VELY, -500.000000
IC,      166,VELY, -500.000000
IC,      167,VELY, -500.000000
IC,      168,VELY, -500.000000
IC,      169,VELY, -500.000000
IC,      170,VELY, -500.000000
IC,      171,VELY, -500.000000
IC,      172,VELY, -500.000000
IC,      173,VELY, -500.000000
IC,      174,VELY, -500.000000
IC,      175,VELY, -500.000000
IC,      176,VELY, -500.000000
IC,      177,VELY, -500.000000
IC,      178,VELY, -500.000000
IC,      179,VELY, -500.000000
IC,      180,VELY, -500.000000
IC,      181,VELY, -500.000000
IC,      182,VELY, -500.000000
IC,      183,VELY, -500.000000
FINISH
